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# New method involving BV0202:
# Look at the setup above. Assume that the values L1, and L2 are unknown.
# We have previously estimated the values of R1, R2 and R3.
# We have the voltage probe PR1 available and we have control over the switch S1. How can we determine the parameters of the inductors?
# We can't express in terms of flow now, since it is shut off in second test.
# Instead we can look at the pressure at the appliance and compare with the pressure at the outlet.
# (We known V_i, and we read V_Z2)
# First symbolically:
Z_1 := R_1 + L_1*s
Z_2 := R_2 + L_2*s
Z_3 := R_3
V_Z2_1 := V_i*Z_3/(Z_1 + Z_2 + Z_3) simplify → R_3*V_i/((L_2 + L_1)*s + R_3 + R_2 + R_1)  # <- When main pipe is connected
V_Z2_2 := V_i*Z_3/(Z_2 + Z_3) simplify → R_3*V_i/(L_2*s + R_3 + R_2)  # <- When main pipe is not connected
# We see that we expect the transfer functions to be two 1st order systems.
# By reading from the pressure sensor over V_Z2 we can obtain the time constant of V_Z2_2 and thereby deduce L_2. We can then use this to solve for V_Z2_1:
# Let's pretend the parameters had these values:
R_1 := 2
R_2 := 4
R_3 := 5
L_1 := 1*10^-3
L_2 := 3*10^-3
Z_1 := R_1 + L_1*s  # error: These units are not compatible.
Z_2 := R_2 + L_2*s  # error: These units are not compatible.
Z_3 := R_3
# Based on sensor data, we should then be able to read that V_Z2_2 had the following transfer function:
V_Z2_2 := V_i*Z_3/(Z_2 + Z_3) simplify → 5000*V_i/(3*s + 9000)
# ->
V_i*5000/3*1/(s + 3000)
# ->
V_i*5000/(3*3000)*3000/(s + 3000)  # ->
V_i*K*α/(s + α)
K == 5000/9000 → K == 5/9
α == 3000
τ == 1/3000
# We should read a rise time of 1/3000seconds and a gain of 5/9.
V_Z2_1 := V_i*Z_3/(Z_1 + Z_2 + Z_3) simplify → 1250*V_i/(s + 2750)  # ->
V_i*1250*1/(s + 2750)
# ->
V_i*1250/2750*2750/(s + 2750)
# ->
V_i*K*α/(s + α)
K == 1250/2750 → K == 5/11
α == 2750
τ == 1/2750
# We should read a rise time of 1/2750seconds and a gain of 5/11.
clear(Z_1, Z_2, L_1, L_2)  # <- We no longer known the inductances. Only the transfer functions and their shapes and resistances.
# We can start by finding L_2:
Z_2 := V_Z2_2 == V_i*Z_3/(Z_2 + Z_3) solve, Z_2 → (3*s + 4000)/1000
L_2 := Z_2 - R_2 → 3*s/1000
# We can then find L_1:
Z_1 := V_Z2_1 == V_i*Z_3/(Z_1 + Z_2 + Z_3) solve, Z_1 → (s + 2000)/1000
L_1 := Z_1 - R_1 → s/1000
# Hurray!
# We can also do like when we deduced the resistances:
clear(Z_1, Z_2, L_1, L_2)
A := [V_i, 0; 0, V_i]
x := [Z_3/(Z_1 + Z_2 + Z_3); Z_3/(Z_2 + Z_3)]
B := [V_Z2_1; V_Z2_2]
[Z_1, Z_2] := A*x == B solve, Z_1, Z_2; assume, ALL ≥ 0 → [(s + 2000)/1000, (3*s + 4000)/1000]
L_1 := Z_1 - R_1 → s/1000
L_2 := Z_2 - R_2 → 3*s/1000
# Lets plot the curves:
v_Z2_1(t) := V_Z2_1/V_i*1/s invlaplace → (-(5*e^(-(2750*t))) + 5)/11
v_Z2_2(t) := V_Z2_2/V_i*1/s invlaplace → (-(5*e^(-(3000*t))) + 5)/9
# [plot: v_Z2_1(t) vs t]
# [plot: v_Z2_2(t) vs t]
