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# Showing that previous te methodology technically still works:
# Look at the setup above. Assume that the values L1, L2, and L3 are unknown.
# We have previously estimated the values of R1, R2, and R3.
# We have the voltage/current probe PR1 available and we have control over the switches S1 and S2. How can we determine the parameters of the inductors?
# (Note: for now we assume that R2, R3 include the resistance of the appliances)
# Note: There is something I didn't think of when making this experiment...
# We cannot use the flow-sensor as intended, since we need to close the valve next to the pump.
# It will not give a reliable reading. Instead the approach with BV0202 is much preferred.
R_1 := 1
R_2 := 2
R_3 := 3
L_1 := 2*s
L_2 := 3*s
L_3 := 4*s
Z_1 := R_1 + L_1
Z_2 := R_2 + L_2
Z_3 := R_3 + L_3
Z_4 := (Z_2^-1 + Z_3^-1)^-1
A_1 := V_i*1/(Z_1 + Z_2) simplify → V_i/(5*s + 3)
A_2 := V_i*1/(Z_1 + Z_3) simplify → V_i/(6*s + 4)
A_3 := V_i*1/(Z_1 + Z_4) simplify → V_i*(7*s + 5)/(26*s^2 + 34*s + 11)
clear(Z_1, Z_2, Z_3, L_1, L_2, L_3)
A := [V_i, 0, 0; 0, V_i, 0; 0, 0, V_i]
x := [1/(Z_1 + Z_2); 1/(Z_1 + Z_3); 1/(Z_1 + Z_4)]
B := [A_1; A_2; A_3]  # <- Voltage / Inductance = Current
[Z_1, Z_2, Z_3] := A*x == B solve, Z_1, Z_2, Z_3; assume, ALL ≥ 0 → [2*s + 1, 3*s + 2, 4*s + 3]
L_1 := Z_1 - R_1 → 2*s
L_2 := Z_2 - R_2 → 3*s
L_3 := Z_3 - R_3 → 4*s
# Showing the shapes of the transfer functions we need to observe:
clear(R_1, R_2, R_3, Z_1, Z_2, Z_3, L_1, L_2, L_3, A_1, A_2, A_3)
Z_1 := R_1 + L_1*s
Z_2 := R_2 + L_2*s
Z_3 := R_3 + L_3*s
Z_4 := (Z_2^-1 + Z_3^-1)^-1
A_1 := V_i*1/(Z_1 + Z_2) simplify → V_i/((L_2 + L_1)*s + R_2 + R_1)  # <- First order low pass filter = easy
A_2 := V_i*1/(Z_1 + Z_3) simplify → V_i/((L_3 + L_1)*s + R_3 + R_1)  # <- First order low pass filter = easy
A_3 := V_i*1/(Z_1 + Z_4) simplify → V_i*((L_3 + L_2)*s + R_3 + R_2)/(((L_2 + L_1)*L_3 + L_1*L_2)*s^2 + ((L_2 + L_1)*R_3 + (L_3 + L_1)*R_2 + (L_3 + L_2)*R_1)*s + (R_2 + R_1)*R_3 + R_1*R_2)
# <- Second order with weird shape
# If we define actual values for the resistors, then we can get a better idea of the transfer function component:
R_1 := 2
R_2 := 3
R_3 := 7  # <- (Values that are not divisible)
Z_1 := R_1 + L_1*s
Z_2 := R_2 + L_2*s
Z_3 := R_3 + L_3*s
Z_4 := (Z_2^-1 + Z_3^-1)^-1
A_3 := V_i*1/(Z_1 + Z_4) simplify → V_i*((L_3 + L_2)*s + 10)/(((L_2 + L_1)*L_3 + L_1*L_2)*s^2 + (5*L_3 + 9*L_2 + 10*L_1)*s + 41)
# Is something like:
(A*s + B)/(C*s^2 + D*s + E)
# This can also be described as (see "predicting_dynamics"):
K*(1 + M*s)*(ω_n^2/(s^2 + 2*ζ*ω_n*s + ω_n^2))
# I.e. a gain, a low-pass component and a high-pass component.
# The tricky part is to determine each component
# Continued in "predicting_dynamics"
