# Showcasing why we can only predict dynamics:
# Function we can predict:
G(s) := 1/(s^2 + 0.7*s + 1)  # <- Actual function
g(t) := G(s)*1/s invlaplace → -0.373632358879*e^(-0.35*t)*sin(0.93674969976*t) + (1.0 - 1.0*cos(0.93674969976*t)*e^(-0.35*t))  # <- step response
K := 1
# <- Gain factor
T_p := 3.36  # <- Peak time
OS := 1.30/1 - 1 → 0.3
ζ := sqrt(ln(OS)^2/(π^2 + ln(OS)^2)) = 0.357857
# <- https://www.fxsolver.com/browse/formulas/Damping+ratio++%28related+to+the+percentage+overshoot%29
# (They don't use decimal percentages)
ω_n := π/(T_p*sqrt(1 - ζ^2)) = 1.00131
F(s) := K*ω_n^2/(s^2 + 2*ζ*ω_n*s + ω_n^2) → 1.00261788856/(s^2 + 0.716650478765*s + 1.00261788856)  # <- Estimated system
f(t) := F(s)*1/s invlaplace → -0.383236446313*e^(-0.358325239383*t)*sin(0.934997813568*t) + (1.0 - 1.0*cos(0.934997813568*t)*e^(-0.358325239383*t))
# [plot: f(t), g(t) vs t]
# Another function we can predict:
G(s) := 2*1/(s^2 + 0.7*s + 1)  # <- Actual function - Gain + dynamics
g(t) := G(s)*1/s invlaplace → -0.747264717757*e^(-0.35*t)*sin(0.93674969976*t) + (2.0 - 2.0*cos(0.93674969976*t)*e^(-0.35*t))  # <- step response
K := 2
# <- Gain factor
T_p := 3.36  # <- Peak time
OS := 1.30/1 - 1 → 0.3
ζ := sqrt(ln(OS)^2/(π^2 + ln(OS)^2)) = 0.357857
ω_n := π/(T_p*sqrt(1 - ζ^2)) = 1.00131
F(s) := K*ω_n^2/(s^2 + 2*ζ*ω_n*s + ω_n^2) → 2.00523577711/(s^2 + 0.716650478765*s + 1.00261788856)  # <- Estimated system
f(t) := F(s)*1/s invlaplace → -0.766472892627*e^(-0.358325239383*t)*sin(0.934997813568*t) + (2.0 - 2.0*cos(0.934997813568*t)*e^(-0.358325239383*t))
# [plot: f(t), g(t) vs t]
# Another try - more difficult that might resemble our system:
G(s) := (4*s + 2)/(s^2 + 2*s + 1)  # <- Can be decomposed to:
G(s) := 2*(1 + 2*s)*1/(s^2 + 2*s + 1)
K := 2
X(s) := 2*s  # <- Zero
G(s) := K*(1 + X(s))*(1/(s^2 + 2*s + 1))
# <- Conclusion:
# We would need a way to determine the values of K and X(s). That is not possible without being able to vary the frequencies of the input signal. We need to think differently.
g(t) := G(s)*1/s invlaplace → (2*t - 2)*e^(-t) + 2
# [plot: g(t) vs t]
